// SBML level 2 version 4

function Constant_flux__irreversible(v)
  v;
end
Constant_flux__irreversible is "Constant flux (irreversible)";

function Rate_Law_1_substrate_1_modifier_1_0(MG_094_HEXAMER, dsDNA, unwinding_rate)
  unwinding_rate*dsDNA*MG_094_HEXAMER;
end

function Function_for_leading_strand_polymerisation_1_1(DNA_POLYMERASE_CORE_BETA_CLAMP_GAMMA_COMPLEX, Lead_polymerisation_rate, MG_250_MONOMER, leadSsDNA)
  Lead_polymerisation_rate*leadSsDNA*MG_250_MONOMER*DNA_POLYMERASE_CORE_BETA_CLAMP_GAMMA_COMPLEX;
end

model Replication()

  // Compartments:
  compartment default = 1;

  // Species:
  species dsDNA in default = 58008; dsDNA is "dsDNA bp";
  species MG_094_HEXAMER in default = 2; MG_094_HEXAMER is "Helicase";
  species leadSsDNA in default = 0; leadSsDNA is "leading ssDNA base";
  species lagSsDNA in default = 0; lagSsDNA is "lagging ssDNA base";
  species MG_254_MONOMER in default = 3; MG_254_MONOMER is "ligase";
  species DNA_POLYMERASE_CORE in default = 3; DNA_POLYMERASE_CORE is "core subunit";
  species MG_001_DIMER in default = 2; MG_001_DIMER is "beta-clamp";
  species MG_250_MONOMER in default = 3; MG_250_MONOMER is "primase";
  species DNA_POLYMERASE_GAMMA_COMPLEX in default = 1; DNA_POLYMERASE_GAMMA_COMPLEX is "gamma complex";
  species leadDsDNA in default = 0; leadDsDNA is "leading dsDNA bp with a break";
  species DNA_POLYMERASE_CORE_BETA_CLAMP_GAMMA_COMPLEX in default = 5; DNA_POLYMERASE_CORE_BETA_CLAMP_GAMMA_COMPLEX is "DNA polymerase III";
  species DnaA_ATP_complex in default = 0; DnaA_ATP_complex is "DnaA-ATP complex";
  species Complete_DNA in default = 0;

  // Parameters:
  Lead_ligation_rate = 0.004;
  Lead_polymerisation_rate = 0;
  polymerase_complex_creation_rate = 1;
  unwinding_rate = 0;
  DnaA_ATP_complex_creation_rate = 1; DnaA_ATP_complex_creation_rate is "DnaA-ATP complex creation rate";

  // Reactions:
  unwinding: dsDNA => leadSsDNA + lagSsDNA; default*Rate_Law_1_substrate_1_modifier_1_0(MG_094_HEXAMER, dsDNA, unwinding_rate);  // modifiers: MG_094_HEXAMER
  leading_strand_polymerisation: leadSsDNA => leadDsDNA; default*Function_for_leading_strand_polymerisation_1_1(DNA_POLYMERASE_CORE_BETA_CLAMP_GAMMA_COMPLEX, Lead_polymerisation_rate, MG_250_MONOMER, leadSsDNA);  // modifiers: MG_250_MONOMER, DNA_POLYMERASE_CORE_BETA_CLAMP_GAMMA_COMPLEX
  Polymerase_complex_creation: 2 DNA_POLYMERASE_CORE + DNA_POLYMERASE_GAMMA_COMPLEX + MG_001_DIMER => DNA_POLYMERASE_CORE_BETA_CLAMP_GAMMA_COMPLEX; default*polymerase_complex_creation_rate*DNA_POLYMERASE_CORE^2*DNA_POLYMERASE_GAMMA_COMPLEX*MG_001_DIMER;
  DnaA_ATP_complex_creation: => DnaA_ATP_complex; default*Constant_flux__irreversible(DnaA_ATP_complex_creation_rate); DnaA_ATP_complex_creation is "DnaA-ATP complex creation";

  // Events:
  terminate: at ((leadDsDNA*default >= 58007) && (MG_254_MONOMER*default >= 1)): Complete_DNA = Complete_DNA*default + 1, leadDsDNA = 0;
  replication_initiation: at (DnaA_ATP_complex*default >= 1): unwinding_rate = 0.000173, DnaA_ATP_complex = 0, DnaA_ATP_complex_creation_rate = 0;
  start_polymerisation: at (leadSsDNA*default >= 10): Lead_polymerisation_rate = 10;

  // Unit definitions:
  unit volume = dimensionless;
  unit time = dimensionless;
  unit substance = item;
end
