// SBML level 3 version 1

function my_hill(x)
  x/(0.01 + x);
end

model Replication()
  // model units - substance: substance, time: time_unit, volume: volume

  // Compartments:
  compartment default = 1;

  // Species:
  species unfinished_okazaki_fragment in default = 0;
  species okazaki_fragment in default = 0; okazaki_fragment is "lagging ssDNA with an Okazaki fragment";
  species lagDsDNA in default = 0; lagDsDNA is "lagDsDNA bp";
  species DnaA_ATP_complex in default = 0; DnaA_ATP_complex is "DnaA-ATP complex";
  species leadSsDNA in default = 0; leadSsDNA is "leading ssDNA";
  species leadDsDNA in default = 0; leadDsDNA is "leading dsDNA bp with a break";
  species Complete_DNA in default = 0;
  species dsDNA in default = 580076;
  species lagSsDNA in default = 0; lagSsDNA is "lagging ssDNA";
  species MG_094_HEXAMER in default = 50; MG_094_HEXAMER is "Helicase";
  species DNA_POLYMERASE_CORE_BETA_CLAMP_GAMMA_COMPLEX in default; DNA_POLYMERASE_CORE_BETA_CLAMP_GAMMA_COMPLEX is "DNA polymerase III";
  species MG_250_MONOMER in default = 5; MG_250_MONOMER is "primase";
  species DNA_POLYMERASE_CORE in default; DNA_POLYMERASE_CORE is "core subunit";
  species DNA_POLYMERASE_GAMMA_COMPLEX in default; DNA_POLYMERASE_GAMMA_COMPLEX is "gamma complex";
  species MG_001_DIMER in default; MG_001_DIMER is "beta-clamp";

  // Parameters:
  okazaki_fragment_length = 1500;
  DnaA_ATP_complex_creation_rate = 1;
  unwinding_rate = 0;
  bp_before_polymerization = 100;
  Lead_polymerisation_rate = 0;
  genome_length = 580076;
  okazaki_polymerisation_rate = 100;
  Initiation_rate = 1;
  Lag_ligation_rate = 0.04;
  Lead_ligation_rate = 0.04;
  polymerase_complex_creation_rate = 1;
  ssb_binding_rate = 1;
  SSB_transformation_rate = 1;
  terminal_lag_ligation_rate = 0.04;
  termination_rate = 1;
  re26_k1 = 0;
  re32_k = 0;
  MG_254_MONOMER = ; MG_254_MONOMER is "ligase";
  primase = ;
  MG_091_TETRAMER = ; MG_091_TETRAMER is "SSB tetramer";
  lagSsDNA_MG_091_OCTAMER = ; lagSsDNA_MG_091_OCTAMER is "lagging ssDNA with SSBP bound";
  MG_091_OCTAMER = ; MG_091_OCTAMER is "SSB octamer";
  block_of_100_bases_of_leading_ssDNA = ;
  terminal_lagging_strand_ligation = ;
  terminal_leading_strand_ligation = ;
  SSB_binding = ;
  lagging_strand_ligation = ;
  Polymerase_complex_creation = ;
  SSB_dissociation = ;
  initiation = ;
  termination = ;
  SSB_association = ;
  lead_ssDNA_block_creation = ;

  // Reactions:
  unwinding: dsDNA => leadSsDNA + lagSsDNA; default*unwinding_rate*MG_094_HEXAMER*my_hill(dsDNA);  // modifiers: MG_094_HEXAMER
  leading_strand_polymerisation: leadSsDNA => leadDsDNA; default*Lead_polymerisation_rate*my_hill(leadSsDNA)*my_hill(primase)*my_hill(DNA_POLYMERASE_CORE_BETA_CLAMP_GAMMA_COMPLEX);  // modifiers: DNA_POLYMERASE_CORE_BETA_CLAMP_GAMMA_COMPLEX
  Okazaki_creation: lagSsDNA => unfinished_okazaki_fragment; default*okazaki_polymerisation_rate*my_hill(lagSsDNA);
  DnaA_ATP_complex_creation: => DnaA_ATP_complex; default*DnaA_ATP_complex_creation_rate;
  Polymerase_complex_reaction: 2 DNA_POLYMERASE_CORE + DNA_POLYMERASE_GAMMA_COMPLEX + MG_001_DIMER => DNA_POLYMERASE_CORE_BETA_CLAMP_GAMMA_COMPLEX; DNA_POLYMERASE_CORE^2*DNA_POLYMERASE_GAMMA_COMPLEX*MG_001_DIMER;

  // Events:
  FinishOkazakiFragment: at (unfinished_okazaki_fragment >= okazaki_fragment_length): okazaki_fragment = okazaki_fragment + 1, unfinished_okazaki_fragment = unfinished_okazaki_fragment - okazaki_fragment_length;
  LigateOkazakiFragments: at (okazaki_fragment >= 2): lagDsDNA = lagDsDNA + 2*okazaki_fragment_length, okazaki_fragment = okazaki_fragment - 2;
  replication_initiation: at (DnaA_ATP_complex*default >= 1): unwinding_rate = 2, DnaA_ATP_complex = 0, DnaA_ATP_complex_creation_rate = 0;
  start_polymerisation: at (leadSsDNA*default >= bp_before_polymerization): Lead_polymerisation_rate = 100;
  terminate_lead: at ((leadDsDNA*default >= genome_length - 1) && (MG_254_MONOMER >= 1)): Complete_DNA = Complete_DNA + 1, leadDsDNA = 0;
  terminate_lag: at ((lagDsDNA*default >= genome_length - okazaki_fragment_length) && (MG_254_MONOMER >= 1)): Complete_DNA = Complete_DNA + 1, lagDsDNA = 0;

  // Unit definitions:
  unit volume = dimensionless;
  unit time_unit = dimensionless;
  unit substance = item;
end
