// SBML level 2 version 4

function Rate_Law_1_substrate_3_modifier(k, s1, m, m2, m3)
  k*s1*m3*m*m2;
end

function Rate_Law_1_substrate_1_modifier(k, s, m)
  k*s*m;
end

function Rate_Law_2_substrate(k, s1, s2)
  k*s1*s2;
end

function Rate_Law_1_substrate(s, k)
  s*k;
end

model Replication()

  // Compartments:
  compartment default = 1;

  // Species:
  species dsDNA in default = 580076; dsDNA is "dsDNA bp";
  species MG_094_HEXAMER in default = 50; MG_094_HEXAMER is "Helicase";
  species leadSsDNA in default = 0; leadSsDNA is "leading ssDNA base";
  species lagSsDNA in default = 0; lagSsDNA is "lagging ssDNA base";
  species MG_254_MONOMER in default = 50; MG_254_MONOMER is "ligase";
  species DNA_POLYMERASE_CORE in default = 50; DNA_POLYMERASE_CORE is "core subunit";
  species MG_001_DIMER in default = 50; MG_001_DIMER is "beta-clamp";
  species MG_250_MONOMER in default = 50; MG_250_MONOMER is "primase";
  species DNA_POLYMERASE_GAMMA_COMPLEX in default = 50; DNA_POLYMERASE_GAMMA_COMPLEX is "gamma complex";
  species leadDsDNA in default = 0; leadDsDNA is "dsDNA bp with a break";
  species lagDsDNA in default = 0;
  species okazaki_fragment in default = 0; okazaki_fragment is "lagging ssDNA with an Okazaki fragment";
  species MG_091_TETRAMER in default = 50; MG_091_TETRAMER is "SSB tetramer";
  species lagSsDNA_MG_091_OCTAMER in default = 0; lagSsDNA_MG_091_OCTAMER is "lagging ssDNA with SSBP bound";
  species MG_091_OCTAMER in default = 50; MG_091_OCTAMER is "SSB octamer";
  species DNA_POLYMERASE_CORE_BETA_CLAMP_GAMMA_COMPLEX in default = 0; DNA_POLYMERASE_CORE_BETA_CLAMP_GAMMA_COMPLEX is "DNA polymerase III";
  species DnaA_ATP_complex in default = 1; DnaA_ATP_complex is "DnaA-ATP complex";
  species Complete_DNA in default = 0;
  species block_of_100_bases_of_leading_ssDNA in default = 1;

  // Parameters:
  Initiation_rate = 999999;
  Lag_ligation_rate = 0.04;
  Lead_ligation_rate = 0.04;
  Lead_polymerisation_rate = 100;
  okazaki_polymerisation_rate = 100;
  polymerase_complex_creation_rate = 1;
  ssb_binding_rate = 1;
  SSB_transformation_rate = 1;
  terminal_lag_ligation_rate = 0.04;
  termination_rate = 99999;
  unwinding_rate = 100;
  Lead_ss_dna_block_rate = 100;

  // Reactions:
  unwinding: dsDNA => leadSsDNA + lagSsDNA; default*Rate_Law_1_substrate_1_modifier(unwinding_rate, dsDNA, MG_094_HEXAMER);  // modifiers: MG_094_HEXAMER
  terminal_lagging_strand_ligation: 580076 lagDsDNA => Complete_DNA; default*terminal_lag_ligation_rate*lagDsDNA^580076;  // modifiers: MG_254_MONOMER
  terminal_leading_strand_ligation: 580076 leadDsDNA => Complete_DNA; default*Lead_ligation_rate*leadDsDNA^580076;  // modifiers: MG_254_MONOMER
  leading_strand_polymerisation: block_of_100_bases_of_leading_ssDNA => 100 leadDsDNA; default*Lead_polymerisation_rate*block_of_100_bases_of_leading_ssDNA;  // modifiers: MG_250_MONOMER, DNA_POLYMERASE_CORE_BETA_CLAMP_GAMMA_COMPLEX
  Okazaki_creation: lagSsDNA_MG_091_OCTAMER => okazaki_fragment + 9 MG_091_OCTAMER; default*Rate_Law_1_substrate_3_modifier(okazaki_polymerisation_rate, lagSsDNA_MG_091_OCTAMER, MG_250_MONOMER, DNA_POLYMERASE_CORE_BETA_CLAMP_GAMMA_COMPLEX, MG_001_DIMER);  // modifiers: MG_250_MONOMER, DNA_POLYMERASE_CORE_BETA_CLAMP_GAMMA_COMPLEX, MG_001_DIMER
  SSB_binding: 1500 lagSsDNA + 18 MG_091_TETRAMER => lagSsDNA_MG_091_OCTAMER; default*ssb_binding_rate*lagSsDNA^1500*MG_091_TETRAMER^18;
  lagging_strand_ligation: 1500 okazaki_fragment => 3000 lagDsDNA; default*Lag_ligation_rate*okazaki_fragment^1500;  // modifiers: MG_254_MONOMER
  Polymerase_complex_creation: 2 DNA_POLYMERASE_CORE + DNA_POLYMERASE_GAMMA_COMPLEX + MG_001_DIMER => DNA_POLYMERASE_CORE_BETA_CLAMP_GAMMA_COMPLEX; default*polymerase_complex_creation_rate*DNA_POLYMERASE_CORE^2*DNA_POLYMERASE_GAMMA_COMPLEX*MG_001_DIMER;
  SSB_dissociation: MG_091_OCTAMER => 2 MG_091_TETRAMER; default*SSB_transformation_rate*MG_091_OCTAMER;
  initiation: Complete_DNA + DnaA_ATP_complex => 580076 dsDNA; default*Rate_Law_2_substrate(k, Complete_DNA, DnaA_ATP_complex);
    k = 0;
  termination: 2 Complete_DNA => ; default*Rate_Law_1_substrate(Complete_DNA, termination_rate);
  SSB_association: 2 MG_091_TETRAMER => MG_091_OCTAMER; default*SSB_transformation_rate*MG_091_TETRAMER^2;
  lead_ssDNA_block_creation: 100 leadSsDNA => block_of_100_bases_of_leading_ssDNA; default*Lead_ss_dna_block_rate*leadSsDNA^100;

  // Unit definitions:
  unit volume = dimensionless;
  unit time = dimensionless;
  unit substance = item;
end
