// SBML level 3 version 1

model chromosomeSegragation()

  // Compartments:
  compartment default_compartment = 1;

  // Species:
  species CobQ in default_compartment = 1;
  species mraZ in default_compartment = 1;
  species Era in default_compartment = 1;
  species Obg in default_compartment = 1;
  species topoisomerase in default_compartment = 1;
  species gtp in default_compartment = 500;
  species gdp in default_compartment = 500;
  species h in default_compartment = 500;
  species h2o in default_compartment = 0;
  species p in default_compartment = 500;

  // Parameters:
  ChromosomeIsSegregated = 0;
  Chromosome_polymerizedRegions = 232304;
  Chromosome_supercoiled = 4;
  Chromosome_nCompartments = 4;
  Chromosome_sequenceLen = 58076;
  gtpCost = 1;

  // Reactions:
  _J0: => h2o; 1;

  // Events:
  TriggerChromosomeSegregation: at ((h2o >= gtpCost) && (Chromosome_polymerizedRegions == Chromosome_nCompartments*Chromosome_sequenceLen) && (Chromosome_supercoiled == Chromosome_nCompartments) && (CobQ >= 1) && (mraZ >= 1) && (Era >= 1) && (Obg >= 1) && (topoisomerase >= 1) && (gtp >= gtpCost) && (h2o >= gtpCost)): ChromosomeIsSegregated = 1, h = h + gtpCost, p = p + gtpCost, gdp = gdp + gtpCost, gtp = gtp - gtpCost, h2o = h2o - gtpCost;
end
